<?xml version="1.0"?>
<?xml-stylesheet type="text/xsl" href="http://jsbsim.sourceforge.net/JSBSim.xsl"?>
<fdm_config name="skyraider" version="2.0" release="ALPHA"
   xmlns:xsi="http://www.w3.org/2001/XMLSchema-instance"
   xsi:noNamespaceSchemaLocation="http://jsbsim.sourceforge.net/JSBSim.xsd">

 <fileheader>
  <author> David Culp </author>
  <filecreationdate> now </filecreationdate>
  <version> 1.0 </version>
  <description> Models a Republic P-47D Thunderbolt. </description>
 </fileheader>


 <metrics>
   <wingarea  unit="FT2">  300.00 </wingarea>
   <wingspan  unit="FT" >   40.77 </wingspan>
   <wing_incidence>          2.00 </wing_incidence>
   <chord     unit="FT" >    7.36 </chord>
   <htailarea unit="FT2">   36.00 </htailarea>
   <htailarm  unit="FT" >   22.00 </htailarm>
   <vtailarea unit="FT2">   28.00 </vtailarea>
   <vtailarm  unit="FT" >   22.00 </vtailarm>
   <location name="AERORP" unit="IN">
     <x> 136.00 </x>
     <y>   0.00 </y>
     <z>  -8.00 </z>
   </location>
   <location name="EYEPOINT" unit="IN">
     <x> 120.96 </x>
     <y>   0.00 </y>
     <z>  40.00 </z>
   </location>
   <location name="VRP" unit="IN">
     <x> 138</x>
     <y>   0</y>
     <z> -10</z>
   </location>
 </metrics>

 <mass_balance>
   <ixx unit="SLUG*FT2">     18132 </ixx>
   <iyy unit="SLUG*FT2">     32259 </iyy>
   <izz unit="SLUG*FT2">     49245 </izz>
   <ixy unit="SLUG*FT2">         0 </ixy>
   <ixz unit="SLUG*FT2">         0 </ixz>
   <iyz unit="SLUG*FT2">         0 </iyz>
   <emptywt unit="LBS" >     10000 </emptywt>
   <location name="CG" unit="IN">
     <x> 150.00 </x>
     <y>   0.00 </y>
     <z> -10.00 </z>
   </location>
   <!--
   <pointmass name="station1">
      <weight unit="LBS"> 0 </weight>
      <location name="POINTMASS" unit="IN">
          <x>  140 </x>
          <y> -120 </y>
          <z>  -19 </z>
      </location>
   </pointmass>
   <pointmass name="station2">
      <weight unit="LBS"> 40 </weight>
      <location name="POINTMASS" unit="IN">
          <x>  136 </x>
          <y>    0 </y>
          <z>  -22 </z>
      </location>
   </pointmass>
   <pointmass name="station3">
      <weight unit="LBS"> 0 </weight>
      <location name="POINTMASS" unit="IN">
          <x>  140 </x>
          <y>  120 </y>
          <z>  -19 </z>
      </location>
   </pointmass>
   -->
 </mass_balance>

 <ground_reactions>

  <contact type="BOGEY" name="LEFT_MAIN">
   <location unit="IN">
     <x> 118.00 </x>
     <y> -85.00 </y>
     <z>-102.00 </z>
   </location>
   <static_friction>  0.85 </static_friction>
   <dynamic_friction> 0.50 </dynamic_friction>
   <rolling_friction> 0.03 </rolling_friction>
   <spring_coeff unit="LBS/FT">      18000.00 </spring_coeff>
   <damping_coeff unit="LBS/FT/SEC"> 12000.00 </damping_coeff>
   <brake_group>LEFT</brake_group>
   <retractable>1</retractable>
 </contact>

  <contact type="BOGEY" name="RIGHT_MAIN">
   <location unit="IN">
     <x> 118.00 </x>
     <y>  85.00 </y>
     <z>-102.00 </z>
   </location>
   <static_friction>  0.85 </static_friction>
   <dynamic_friction> 0.50 </dynamic_friction>
   <rolling_friction> 0.03 </rolling_friction>
   <spring_coeff unit="LBS/FT">      18000.00 </spring_coeff>
   <damping_coeff unit="LBS/FT/SEC"> 12000.00 </damping_coeff>
   <brake_group>RIGHT</brake_group>
   <retractable>1</retractable>
 </contact>

  <contact type="BOGEY" name="TAIL">
   <location unit="IN">
     <x> 374.00 </x>
     <y>   0.00 </y>
     <z> -34.00 </z>
   </location>
   <static_friction>  0.90 </static_friction>
   <dynamic_friction> 0.70 </dynamic_friction>
   <rolling_friction> 0.03 </rolling_friction>
   <spring_coeff unit="LBS/FT">      10000.00 </spring_coeff>
   <damping_coeff unit="LBS/FT/SEC"> 10000.00 </damping_coeff>
   <max_steer unit="DEG"> 50.00 </max_steer>
   <brake_group>NONE</brake_group>
   <retractable>1</retractable>
 </contact>

  <contact type="STRUCTURE" name="LEFT_WING">
    <location unit="IN">
     <x>  135 </x>
     <y> -240 </y>
     <z>  -10 </z>
    </location>
    <static_friction>  1 </static_friction>
    <dynamic_friction> 1 </dynamic_friction>
    <spring_coeff unit="LBS/FT">       8000.00 </spring_coeff>
    <damping_coeff unit="LBS/FT/SEC">  8000.00 </damping_coeff>
    <damping_coeff_rebound unit="LBS/FT/SEC">  80000.00 </damping_coeff_rebound>
  </contact>

  <contact type="STRUCTURE" name="RIGHT_WING">
    <location unit="IN">
     <x>  135 </x>
     <y>  240 </y>
     <z>  -10 </z>
    </location>
    <static_friction>  1 </static_friction>
    <dynamic_friction> 1 </dynamic_friction>
    <spring_coeff unit="LBS/FT">       8000.00 </spring_coeff>
    <damping_coeff unit="LBS/FT/SEC">  8000.00 </damping_coeff>
    <damping_coeff_rebound unit="LBS/FT/SEC">  80000.00 </damping_coeff_rebound>
  </contact>

  <contact type="STRUCTURE" name="NOSE">
    <location unit="IN">
     <x>   20 </x>
     <y>    0 </y>
     <z>  -30 </z>
    </location>
    <static_friction>  1 </static_friction>
    <dynamic_friction> 1 </dynamic_friction>
    <spring_coeff unit="LBS/FT">       8000.00 </spring_coeff>
    <damping_coeff unit="LBS/FT/SEC">  8000.00 </damping_coeff>
    <damping_coeff_rebound unit="LBS/FT/SEC">  80000.00 </damping_coeff_rebound>
  </contact>

 </ground_reactions>

 <propulsion>

   <engine file="R-2800-73">
    <location unit="IN">
      <x>  36.00 </x>
      <y>   0.00 </y>
      <z>   0.00 </z>
    </location>
    <feed>0</feed>
    <feed>1</feed>
    <thruster file="prop">
     <location unit="IN">
       <x>   7.00 </x>
       <y>   0.00 </y>
       <z>   0.00 </z>
     </location>
     <orient unit="DEG">
       <pitch> 0.00 </pitch>
       <roll>  0.00 </roll>
       <yaw>   0.00 </yaw>
     </orient>
    </thruster>
  </engine>


  <tank type="FUEL" number="0"><!-- internal fuel, 375 gallons -->
     <location unit="IN">
       <x> 136.00 </x>
       <y>   0.00 </y>
       <z> -20.00 </z>
     </location>
     <priority>2</priority>
     <type>AVGAS</type>
     <capacity unit="LBS"> 2250.00 </capacity>
     <contents unit="LBS"> 2250.00 </contents>
  </tank>

  <tank type="FUEL" number="1"><!-- centerline 75 gallon drop tank -->
     <location unit="IN">
       <x> 126.00 </x>
       <y>   0.00 </y>
       <z> -40.00 </z>
     </location>
     <priority>1</priority>
     <type>AVGAS</type>
     <capacity unit="LBS"> 450.00 </capacity>
     <contents unit="LBS"> 400.00 </contents>
  </tank>

 </propulsion>

 <system file="gear"/>
 <system file="flaps"/>
 <system file="FCS-pitch"/>
 <system file="FCS-roll"/>
 <system file="FCS-yaw"/>
 <system file="TWS"/>
 <system file="alpha_buffet"/>
 <!-- <system file="crash-detect"/> -->
 <!-- <system file="armament"/> -->
 <!-- <system file="particles"/> -->
 <system file="speedbrakes"/>
 <!-- <system file="canopy"/> -->
 <system file="automixture"/>
 <!-- <system file="engine-sound"/> -->


 <flight_control name="FCS"/>

 <aerodynamics>

        <function name="aero/function/kCDge">
            <description>Change_in_drag_due_to_ground_effect</description>
            <product>
                  <table>
                      <independentVar>aero/h_b-mac-ft</independentVar>
                      <tableData>
                          0.0000	0.4800
                          0.1000	0.5150
                          0.1500	0.6290
                          0.2000	0.7090
                          0.3000	0.8150
                          0.4000	0.8820
                          0.5000	0.9280
                          0.6000	0.9620
                          0.7000	0.9880
                          0.8000	1.0000
                      </tableData>
                  </table>
            </product>
        </function>

        <function name="aero/function/kCLge">
            <description>Change_in_lift_due_to_ground_effect</description>
            <product>
                  <table>
                      <independentVar>aero/h_b-mac-ft</independentVar>
                      <tableData>
                          0.0000	1.2030
                          0.1000	1.1270
                          0.1500	1.0900
                          0.2000	1.0730
                          0.3000	1.0460
                          0.4000	1.0550
                          0.5000	1.0190
                          0.6000	1.0130
                          0.7000	1.0080
                          0.8000	1.0060
                          0.9000	1.0030
                          1.0000	1.0020
                          1.1000	1.0000
                      </tableData>
                  </table>
            </product>
        </function>


  <axis name="LIFT">

    <function name="aero/coefficient/CLalpha">
      <description>Lift_due_to_alpha</description>
      <product>
          <property>aero/qbar-psf</property>
          <property>metrics/Sw-sqft</property>
          <property>aero/function/kCLge</property>
          <table>
            <independentVar lookup="row">aero/alpha-rad</independentVar>
            <tableData>
              -0.20 -0.730
               0.00  0.160
               0.23  1.140
               0.60  0.382
            </tableData>
          </table>
      </product>
    </function>

    <function name="aero/coefficient/dCLflap">
       <description>Delta_Lift_due_to_flaps</description>
       <product>
           <property>aero/qbar-psf</property>
           <property>metrics/Sw-sqft</property>
           <table>
             <independentVar lookup="row">fcs/flap-pos-norm</independentVar>
             <tableData>
                 0.0      0.0
                 0.5      0.27
                 1.0      0.4
             </tableData>
           </table>
       </product>
    </function>

    <function name="aero/coefficient/CLde">
       <description>Lift_due_to_Elevator_Deflection</description>
       <product>
           <property>aero/qbar-psf</property>
           <property>metrics/Sw-sqft</property>
           <property>fcs/elevator-pos-rad</property>
           <value>0.12</value>
       </product>
    </function>

    <function name="aero/coefficient/buffet">
       <description>Buffet at high alpha</description>
         <product>
           <property>systems/alpha_buffet/sine_wave</property>
           <property>systems/alpha_buffet/strength</property>
         </product>
    </function>

  </axis>

  <axis name="DRAG">

    <function name="aero/coefficient/CD0">
       <description>Drag_at_zero_lift</description>
       <product>
          <property>aero/qbar-psf</property>
          <property>metrics/Sw-sqft</property>
          <table>
            <independentVar lookup="row">aero/alpha-rad</independentVar>
            <tableData>
             -1.57    1.500
             -0.26    0.024
              0.00    0.020
              0.26    0.024
              1.57    1.500
            </tableData>
          </table>
       </product>
    </function>

    <function name="aero/coefficient/CDi">
       <description>Induced_drag</description>
         <product>
           <property>aero/qbar-psf</property>
           <property>metrics/Sw-sqft</property>
           <property>aero/cl-squared</property>
           <property>aero/function/kCDge</property>
           <value>0.07</value>
         </product>
    </function>

    <function name="aero/coefficient/CDmach">
       <description>Drag_due_to_mach</description>
        <product>
          <property>aero/qbar-psf</property>
          <property>metrics/Sw-sqft</property>
          <table>
            <independentVar lookup="row">velocities/mach</independentVar>
            <tableData>
                0.00      0.000
                0.70      0.000
                1.10      0.023
                1.80      0.015
            </tableData>
          </table>
        </product>
    </function>

    <function name="aero/coefficient/CDflap">
       <description>Drag_due_to_flaps</description>
         <product>
           <property>aero/qbar-psf</property>
           <property>metrics/Sw-sqft</property>
           <property>fcs/flap-pos-norm</property>
           <table>
             <independentVar lookup="row">fcs/flap-pos-norm</independentVar>
             <tableData>
                 0.0      0.00
                 0.5      0.01
                 1.0      0.03
             </tableData>
           </table>
         </product>
    </function>

    <function name="aero/coefficient/CDgear">
       <description>Drag_due_to_gear</description>
         <product>
           <property>aero/qbar-psf</property>
           <property>metrics/Sw-sqft</property>
           <property>gear/gear-pos-norm</property>
           <value>0.035</value>
         </product>
    </function>

    <function name="aero/coefficient/CDbeta">
       <description>Drag_due_to_sideslip</description>
       <product>
          <property>aero/qbar-psf</property>
          <property>metrics/Sw-sqft</property>
          <table>
            <independentVar lookup="row">aero/beta-rad</independentVar>
            <tableData>
              -1.57    1.230
              -0.26    0.050
               0.00    0.000
               0.26    0.050
               1.57    1.230
            </tableData>
          </table>
       </product>
    </function>

    <function name="aero/coefficient/CDde">
       <description>Drag_due_to_Elevator_Deflection</description>
       <product>
           <property>aero/qbar-psf</property>
           <property>metrics/Sw-sqft</property>
           <abs><property>fcs/elevator-pos-norm</property></abs>
           <value>0.04</value>
       </product>
    </function>

    <function name="aero/coefficient/CDsb">
       <description>Drag_due_to_speedbrakes</description>
         <product>
           <property>aero/qbar-psf</property>
           <property>metrics/Sw-sqft</property>
           <property>fcs/speedbrake-pos-norm</property>
           <value>0.01</value>
         </product>
    </function>

  </axis>

  <axis name="SIDE">

    <function name="aero/coefficient/CYb">
       <description>Side_force_due_to_beta</description>
       <product>
           <property>aero/qbar-psf</property>
           <property>metrics/Sw-sqft</property>
           <property>aero/beta-rad</property>
           <value>-1</value>
       </product>
    </function>

  </axis>

  <axis name="ROLL">

    <function name="aero/coefficient/Clb">
       <description>Roll_moment_due_to_beta</description>
       <product>
           <property>aero/qbar-psf</property>
           <property>metrics/Sw-sqft</property>
           <property>metrics/bw-ft</property>
           <property>aero/beta-rad</property>
           <value>-0.1</value>
       </product>
    </function>

    <function name="aero/coefficient/Clp">
       <description>Roll_moment_due_to_roll_rate</description>
       <product>
           <property>aero/qbar-psf</property>
           <property>metrics/Sw-sqft</property>
           <property>metrics/bw-ft</property>
           <property>aero/bi2vel</property>
           <property>velocities/p-aero-rad_sec</property>
           <value>-0.4</value>
       </product>
    </function>

    <function name="aero/coefficient/Clr">
       <description>Roll_moment_due_to_yaw_rate</description>
       <product>
           <property>aero/qbar-psf</property>
           <property>metrics/Sw-sqft</property>
           <property>metrics/bw-ft</property>
           <property>aero/bi2vel</property>
           <property>velocities/r-aero-rad_sec</property>
           <value>0.1</value>
       </product>
    </function>

    <function name="aero/coefficient/Clda">
       <description>Roll_moment_due_to_aileron</description>
       <product>
          <property>aero/qbar-psf</property>
          <property>metrics/Sw-sqft</property>
          <property>metrics/bw-ft</property>
          <property>fcs/left-aileron-pos-rad</property>
          <table>
            <independentVar lookup="row">velocities/mach</independentVar>
            <tableData>
              0.0    0.000
              0.1    0.150
            </tableData>
          </table>
       </product>
    </function>

    <function name="aero/coefficient/Cldr">
       <description>Roll_moment_due_to_rudder</description>
       <product>
           <property>aero/qbar-psf</property>
           <property>metrics/Sw-sqft</property>
           <property>metrics/bw-ft</property>
           <property>fcs/rudder-pos-rad</property>
           <value>0.005</value>
       </product>
    </function>

  </axis>

  <axis name="PITCH">

    <function name="aero/coefficient/Cmalpha">
       <description>Pitch_moment_due_to_alpha</description>
       <product>
           <property>aero/qbar-psf</property>
           <property>metrics/Sw-sqft</property>
           <property>metrics/cbarw-ft</property>
           <property>aero/alpha-rad</property>
           <value>-0.5</value>
       </product>
    </function>

    <function name="aero/coefficient/Cmde">
       <description>Pitch_moment_due_to_elevator</description>
       <product>
          <property>aero/qbar-psf</property>
          <property>metrics/Sw-sqft</property>
          <property>metrics/cbarw-ft</property>
          <property>fcs/elevator-pos-rad</property>
          <value>-0.60</value>
       </product>
    </function>

    <function name="aero/coefficient/Cmq">
       <description>Pitch_moment_due_to_pitch_rate</description>
       <product>
           <property>aero/qbar-psf</property>
           <property>metrics/Sw-sqft</property>
           <property>metrics/cbarw-ft</property>
           <property>aero/ci2vel</property>
           <property>velocities/q-aero-rad_sec</property>
           <value>-18</value>
       </product>
    </function>

    <function name="aero/coefficient/Cmadot">
       <description>Pitch_moment_due_to_alpha_rate</description>
       <product>
           <property>aero/qbar-psf</property>
           <property>metrics/Sw-sqft</property>
           <property>metrics/cbarw-ft</property>
           <property>aero/ci2vel</property>
           <property>aero/alphadot-rad_sec</property>
           <value>-9</value>
       </product>
    </function>

  </axis>

  <axis name="YAW">

    <function name="aero/coefficient/Cnb">
       <description>Yaw_moment_due_to_beta</description>
       <product>
           <property>aero/qbar-psf</property>
           <property>metrics/Sw-sqft</property>
           <property>metrics/bw-ft</property>
           <property>aero/beta-rad</property>
           <table>
             <independentVar lookup="row">aero/beta-rad</independentVar>
             <tableData>
              -0.21    0.05
              -0.20    0.10
               0.20    0.10
               0.21    0.05
             </tableData>
           </table>
       </product>
    </function>

    <function name="aero/coefficient/Cnr">
       <description>Yaw_moment_due_to_yaw_rate</description>
       <product>
           <property>aero/qbar-psf</property>
           <property>metrics/Sw-sqft</property>
           <property>metrics/bw-ft</property>
           <property>aero/bi2vel</property>
           <property>velocities/r-aero-rad_sec</property>
           <value>-0.15</value>
       </product>
    </function>

    <function name="aero/coefficient/Cndr">
       <description>Yaw_moment_due_to_rudder</description>
       <product>
           <property>aero/qbar-psf</property>
           <property>metrics/Sw-sqft</property>
           <property>metrics/bw-ft</property>
           <property>fcs/rudder-pos-rad</property>
           <value>-0.035</value>
       </product>
    </function>

    <function name="aero/coefficient/Cndrb">
       <description>Yaw_moment_due_to_blown_rudder</description>
       <product>
           <property>propulsion/engine[0]/thrust-lbs</property>
           <property>fcs/rudder-pos-rad</property>
           <value>-0.68</value>
       </product>
    </function>

    <function name="aero/coefficient/Cni">
       <description>Yaw_moment_due_to_vertical_stab_incidence</description>
       <product>
           <property>aero/qbar-psf</property>
           <property>metrics/Sw-sqft</property>
           <property>metrics/bw-ft</property>
           <value>0.000</value>
       </product>
    </function>

    <function name="aero/coefficient/Cnda">
       <description>Adverse_yaw</description>
       <product>
           <property>aero/qbar-psf</property>
           <property>metrics/Sw-sqft</property>
           <property>metrics/bw-ft</property>
           <property>fcs/left-aileron-pos-rad</property>
           <value>-0.003</value>
       </product>
    </function>

  </axis>

 </aerodynamics>

 <!-- 50 properties output, + 1 for the time stamp -->
 <output name="localhost" type="QTJSBSIM" port="5138" rate="10">

  <property> velocities/vc-kts </property>
  <property> position/h-sl-ft </property>
  <property> attitude/theta-deg </property>
  <property> attitude/phi-deg </property>
  <property> velocities/h-dot-fps </property>
  <property> velocities/mach </property>
  <property> aero/beta-deg </property>
  <property> attitude/psi-deg </property>
  <property> aero/alpha-deg </property>
  <property> velocities/p-rad_sec </property>

  <property> velocities/q-rad_sec </property>
  <property> velocities/r-rad_sec </property>
  <property> velocities/vtrue-kts </property>
  <property> velocities/vg-fps </property>
  <property> velocities/v-north-fps </property>
  <property> velocities/v-east-fps </property>
  <property> velocities/v-down-fps </property>
  <property> velocities/u-fps </property>
  <property> velocities/v-fps </property>
  <property> velocities/w-fps </property>

  <property> position/h-agl-ft </property>
  <property> position/lat-gc-deg </property>
  <property> position/long-gc-deg </property>
  <property> position/lat-geod-deg </property>
  <property> propulsion/engine[0]/thrust-lbs </property>
  <property> propulsion/engine[1]/thrust-lbs </property>
  <property> propulsion/engine[0]/n1 </property>
  <property> propulsion/engine[1]/n1 </property>
  <property> propulsion/engine[0]/n2 </property>
  <property> propulsion/engine[1]/n2 </property>

  <property> propulsion/engine[0]/fuel-flow-rate-pps </property>
  <property> propulsion/engine[1]/fuel-flow-rate-pps </property>
  <property> propulsion/total-fuel-lbs </property>
  <property> inertia/weight-lbs </property>
  <property> inertia/empty-weight-lbs </property>
  <property> gear/gear-pos-norm </property>
  <property> fcs/flap-pos-norm </property>
  <property> fcs/speedbrake-pos-norm </property>
  <property> fcs/right-aileron-pos-norm </property>
  <property> fcs/elevator-pos-norm </property>

  <property> fcs/rudder-pos-norm </property>
  <property> inertia/pointmass-weight-lbs[0] </property>
  <property> propulsion/pt-lbs_sqft </property>
  <property> aero/qbar-psf </property>
  <property> propulsion/tat-c </property>
  <property> atmosphere/T-R </property>
  <property> aero/Re </property>
  <property> forces/load-factor </property>
  <property> atmosphere/rho-slugs_ft3 </property>
  <property> simulation/dt </property>

 </output>

 <!-- this is the telnet interface -->
 <!-- <input port="5137" /> -->

 <!-- 16 properties input, + 1 for the time stamp -->
 <input port="5139" type="QTJSBSIM" rate="20">

  <property> fcs/aileron-cmd-norm </property>
  <property> fcs/elevator-cmd-norm </property>
  <property> fcs/rudder-cmd-norm </property>
  <property> fcs/pitch-trim-cmd-norm </property>
  <property> fcs/roll-trim-cmd-norm </property>
  <property> fcs/yaw-trim-cmd-norm </property>
  <property> fcs/throttle-cmd-norm[0] </property>
  <property> fcs/throttle-cmd-norm[1] </property>
  <property> fcs/flap-cmd-norm </property>
  <property> gear/gear-cmd-norm </property>

  <property> fcs/speedbrake-cmd-norm </property>
  <property> atmosphere/psiw-rad </property>
  <property> atmosphere/wind-mag-fps </property>
  <property> atmosphere/delta-T </property>
  <property> inertia/pointmass-weight-lbs[0] </property>
  <property> simulation/terminate </property>

 </input>


</fdm_config>
